// COMSOL Multiphysics 5.3.1.180 model "thgem2.mph"
// Outline of the model tree

Parameters
  rad = 0.05[mm]  // 半径
  diam = 2*rad  // 直径
  pitch = 3*rad  // 间距
  thick = 0.4[mm]  // 绝缘层厚度
  rim = 0.005[mm]  // rim
  metal = 10[um]  // 金属层厚度
  drift = 0.5[mm]  // 漂移区距离
  induce = 0.5[mm]  // 感应区距离
  vdown = 200[V/mm]*induce  // 下表面电压
  vup = vdown+1500[V/mm]*thick  // 上表面电压
  vcathode = vup+200[V/mm]*drift  // 阴极电压
  meshMax = rad/10  // 最小mesh尺寸
  meshMin = rad/50  // 最大mesh尺寸
  nseg = thick/meshMax  // 内电场区分段数目
  xperiod = 2  // x方向的周期
  yperiod = 2  // y方向的周期
  hex = 1  // 六边形或四边形

Geometry
  geom1 "几何 1" (3D, length unit m)
    blk3: Block "volumn" | pos = {0, 0, -induce}; size = {pitch*4, pitch*2*sqrt(3), induce+metal+thick+metal+drift}
    cyl1: Cylinder "hole10" | pos = {0, 0, metal}; r = rad; h = thick
    econ1: ECone "hole11" | semiaxes = {rad+rim, rad+rim}; h = metal; rat = rad/(rad+rim)
    mir1: Mirror "hole12" | input = econ1; keep = on; pos = {0, 0, (thick+2*metal)/2}
    uni1: Union "hole1" | input = cyl1, econ1, mir1; intbnd = off; face = all
    arr3: Array "阵列 3" | input = uni1; size = 2; type = linear; linearsize = 2; displ = {-pitch/2, sqrt(3)*pitch/2, 0}
    arr4: Array "阵列 4"
      input = arr3(1)
      size = {5, 3, 1}
      linearsize = 3
      fullsize = {5, 3, 1}
      displ = {pitch, pitch*sqrt(3), 0}
    arr5: Array "阵列 5" | input = arr3(2); size = {5, 2, 1}; fullsize = {5, 2, 1}; displ = {pitch, pitch*sqrt(3), 0}
    wp5: WorkPlane "工作平面 5" | unite = on
      b1: BezierPolygon "贝塞尔多边形 1"
        p = 
          {pitch, pitch*3, pitch*4, pitch*3, pitch, 0, pitch}
          {sqrt(3)*2*pitch, sqrt(3)*2*pitch, sqrt(3)*pitch, 0, 0, sqrt(3)*pitch, sqrt(3)*2*pitch}
        degree = {1, 1, 1, 1, 1, 1}
        w = {1, 1, 1, 1, 1, 1, 1, 1, 1, 1, 1, 1}
    ext1: Extrude "拉伸 1" | workplane = wp5; input = wp5; distance = metal+thick+metal
    dif1: Difference "THGEM" | input = ext1; input2 = arr4, arr5
    copy1: Copy "THGEM_bak" | input = dif1; keep = on; displx = 0; disply = 0; displz = 0
    dif2: Difference "gas" | input = blk3; input2 = dif1
    wp1: WorkPlane "工作平面 1" | vertex1 = dif1 8; vertex2 = dif1 20; vertex3 = dif1 18; unite = on
    wp2: WorkPlane "工作平面 2" | quickz = thick+2*metal; unite = on
    wp3: WorkPlane "工作平面 3" | quickz = metal; unite = on
    wp4: WorkPlane "工作平面 4" | quickz = thick+metal; unite = on
    par2: Partition "分割对象 1" | input = dif2; partitionwith = workplane; workplane = wp2
    par1: Partition "分割对象 2" | input = par2; partitionwith = workplane; workplane = wp1
    par3: Partition "分割对象 3" | input = copy1, par1; partitionwith = workplane; workplane = wp3
    par4: Partition "分割对象 4" | input = par3; partitionwith = workplane; workplane = wp4
    fin: Finalize "形成联合体"
    mcd1: MeshControlDomains "网格控制域 1" (disabled) | input = fin 1, 2, 3, 4, 5, 6, 7, 11, 12, 13

Materials
  mat1: Common "Copper [solid,residual resistivity ratio of 30]" on domains 7, 8
    def "基本"
      thermalconductivity = k_solid_residual_resistivity_ratio_of_30_1(T[1/K])[W/(m*K)]
      resistivity = res_solid_1(T[1/K])[ohm*m]
      thermalexpansioncoefficient = (alpha_solid_1(T[1/K])[1/K]+(Tempref-293[K])*if(abs(T-Tempref)>1e-3,(alpha_solid_1(T[1/K])[1/K]-alpha_solid_1(Tempref[1/K])[1/K])/(T-Tempref),d(alpha_solid_1(T[1/K])[1/K],T)))/(1+alpha_solid_1(Tempref[1/K])[1/K]*(Tempref-293[K]))
      heatcapacity = C_solid_1(T[1/K])[J/(kg*K)]
      electricconductivity = sigma_solid_1(T[1/K])[S/m]
      HC = HC_solid_1(T[1/K])[J/(mol*K)]
      VP = VP_solid_1(T[1/K])[Pa]
      density = rho_solid_1(T[1/K])[kg/m^3]
      relpermittivity = 100000
      k_solid_residual_resistivity_ratio_of_30_1: Piecewise "分段 1"
        arg = T
        pieces = 
          {1.0, 40.0, 12.55868+36.66487*T^1+1.387207*T^2-0.07168113*T^3+6.99799E-4*T^4}
          {40.0, 70.0, 2174.919-45.25448*T^1+0.3738471*T^2-9.504397E-4*T^3}
          {70.0, 100.0, 2545.87-67.53869*T^1+0.8176488*T^2-0.004470238*T^3+9.22619E-6*T^4}
          {100.0, 300.0, 555.4-2.116905*T^1+0.008971429*T^2-1.266667E-5*T^3}
          {300.0, 1358.0, 423.7411-0.3133575*T^1+0.001013916*T^2-1.570451E-6*T^3+1.06222E-9*T^4-2.64198E-13*T^5}
      res_solid_1: Piecewise "分段 1a"
        arg = T
        pieces = 
          {1.0, 7.0, 2.0E-11}
          {7.0, 40.0, 1.002557E-11+2.945503E-12*T^1-2.767806E-13*T^2+8.665115E-15*T^3}
          {40.0, 100.0, 1.370786E-9-8.741734E-11*T^1+1.738251E-12*T^2-6.532611E-15*T^3}
          {100.0, 1358.0, -3.514582E-9+7.064722E-11*T^1-8.917638E-15*T^2+1.026538E-17*T^3}
      alpha_solid_1: Piecewise "分段 1b"
        arg = T
        pieces = 
          {4.0, 100.0, 1.104402E-5+4.812192E-8*T^1-1.223083E-10*T^2}
          {100.0, 210.0, 1.276495E-5+1.849516E-8*T^1+1.203963E-11*T^2-1.023671E-13*T^3}
          {210.0, 800.0, 1.47252E-5+8.137386E-9*T^1-4.58414E-12*T^2}
          {800.0, 1273.0, 1.83456E-5-1.577095E-9*T^1+1.908643E-12*T^2}
      C_solid_1: Piecewise "分段 1c"
        arg = T
        pieces = 
          {1.0, 17.5, 0.008168055+0.00104457*T^1+0.003441219*T^2+2.847033E-4*T^3+2.246429E-5*T^4}
          {17.5, 62.0, 29.05972-3.767169*T^1+0.1540539*T^2-0.001048364*T^3+3.010206E-7*T^4}
          {62.0, 300.0, -215.2814+8.236392*T^1-0.04732108*T^2+1.291112E-4*T^3-1.357031E-7*T^4}
          {300.0, 1300.0, 342.764+0.1338348*T^1+5.535252E-5*T^2-1.971221E-7*T^3+1.140747E-10*T^4}
      sigma_solid_1: Piecewise "分段 1d"
        arg = T
        pieces = 
          {1.0, 7.0, 1/(2.000000E-11)}
          {7.0, 40.0, 1/(8.665115E-15*T^3-2.767806E-13*T^2+2.945503E-12*T+1.002557E-11)}
          {40.0, 100.0, 1/(-6.532611E-15*T^3+1.738251E-12*T^2-8.741734E-11*T+1.370786E-09)}
          {100.0, 1358.0, 1/(1.026538E-17*T^3-8.917638E-15*T^2+7.064722E-11*T-3.514582E-09)}
      HC_solid_1: Piecewise "分段 1e"
        arg = T
        pieces = 
          {1.0, 17.5, 5.190474E-4+6.637828E-5*T^1+2.186757E-4*T^2+1.809176E-5*T^3+1.427516E-6*T^4}
          {17.5, 62.0, 1.846629-0.2393885*T^1+0.00978951*T^2-6.661932E-5*T^3+1.912866E-8*T^4}
          {62.0, 300.0, -13.68027+0.5233899*T^1-0.003007065*T^2+8.204498E-6*T^3-8.623391E-9*T^4}
          {300.0, 1300.0, 21.78128+0.008504666*T^1+3.517431E-6*T^2-1.252632E-8*T^3+7.248993E-12*T^4}
      VP_solid_1: Piecewise "分段 1f" | arg = T; pieces = {293.0, 1358.0, (exp((-1.774800e+04/T-7.317000e-01*log10(T)+1.200381e+01)*log(10.0)))*1.333200e+02}
      rho_solid_1: Piecewise "分段 1g"
        arg = T
        pieces = 
          {4.0, 90.0, 9028.155+0.001936185*T^1-4.310034E-4*T^2-8.227902E-6*T^3}
          {90.0, 250.0, 9034.264-0.05885933*T^1-0.001406238*T^2+1.736657E-6*T^3}
          {250.0, 800.0, 9062.242-0.3913962*T^1-8.947644E-5*T^2}
          {800.0, 1273.0, 9038.962-0.3593546*T^1-9.31574E-5*T^2}
    ThermalExpansion "热膨胀"
      alphatan = CTE_solid_1(T[1/K])[1/K]
      dL = (dL_solid_1(T[1/K])-dL_solid_1(Tempref[1/K]))/(1+dL_solid_1(Tempref[1/K]))
      alphatanIso = CTE_solid_1(T)
      dLIso = (dL_solid_1(T)-dL_solid_1(Tempref))/(1+dL_solid_1(Tempref))
      dL_solid_1: Piecewise "分段 1"
        arg = T
        pieces = 
          {4.0, 80.0, -0.003272586-6.837087E-8*T^1+1.574823E-8*T^2+3.040518E-10*T^3}
          {80.0, 250.0, -0.003491523+2.12144E-6*T^1+5.197613E-8*T^2-6.339761E-11*T^3}
          {250.0, 800.0, -0.004355177+1.293125E-5*T^1+7.341229E-9*T^2-2.541027E-12*T^3}
          {800.0, 1273.0, -0.004359242+1.427188E-5*T^1+3.639858E-9*T^2}
      CTE_solid_1: Piecewise "分段 1a"
        arg = T
        pieces = 
          {4.0, 13.0, -8.574809E-9+4.13567E-9*T^1-5.673583E-10*T^2+5.520915E-11*T^3}
          {13.0, 60.0, 2.194122E-7-2.662325E-8*T^1+4.800942E-10*T^2+6.093443E-11*T^3-6.195564E-13*T^4}
          {60.0, 250.0, -8.81E-6+3.292355E-7*T^1-1.773823E-9*T^2+4.545667E-12*T^3-4.483983E-15*T^4}
          {250.0, 800.0, 1.104756E-5+2.743089E-8*T^1-3.159431E-11*T^2+1.370433E-14*T^3}
    Enu "杨氏模量和泊松比"
      youngsmodulus = E(T[1/K])[Pa]
      poissonsratio = nu(T[1/K])
      E: Piecewise "分段"
        arg = T
        pieces = 
          {4.0, 300.0, 1.37E11-3.330669E-6*T^1-127000.0*T^2}
          {300.0, 1250.0, 1.408492E11-4.703751E7*T^1-12923.82*T^2}
      nu: Piecewise "分段 2" | arg = T; pieces = {4.0, 300.0, 0.3378748+7.672235E-7*T^1-3.529109E-8*T^2}
    KG "体积模量和剪切模量"
      K = kappa(T[1/K])[Pa]
      G = mu(T[1/K])[Pa]
      mu: Piecewise "分段" | arg = T; pieces = {4.0, 300.0, 5.12E10+4.718448E-7*T^1-46300.0*T^2}
      kappa: Piecewise "分段 2" | arg = T; pieces = {4.0, 300.0, 1.408545E11-151138.5*T^1-155999.5*T^2}
  mat2: Common "Argon [gas]" on domains 1-5, 9-38
    def "基本"
      thermalconductivity = k_gas_4(T[1/K])[W/(m*K)]
      heatcapacity = C_gas_2(T[1/K])[J/(kg*K)]
      HC = HC_gas_2(T[1/K])[J/(mol*K)]
      density = rho_gas_3(T[1/K])[kg/m^3]
      TD = TD(T[1/K])[m^2/s]
      dynamicviscosity = eta(T[1/K])[Pa*s]
      relpermittivity = 1
      electricconductivity = 0.0001
      k_gas_4: Piecewise "分段 4"
        arg = T
        pieces = 
          {88.0, 340.0, -2.420719E-4+7.233846E-5*T^1-5.020862E-8*T^2+2.864443E-11*T^3}
          {340.0, 690.0, -2.46709E-4+7.367416E-5*T^1-5.22509E-8*T^2+2.297758E-11*T^3}
          {690.0, 2500.0, 0.004222052+5.576743E-5*T^1-2.632101E-8*T^2+1.050359E-11*T^3-1.587964E-15*T^4}
      C_gas_2: Piecewise "分段 2"
        arg = T
        pieces = 
          {100.0, 6800.0, 520.3264}
          {6800.0, 10000.0, 737.3204-0.1356916*T^1+3.349874E-5*T^2-4.069944E-9*T^3+2.423156E-13*T^4-5.615953E-18*T^5}
          {10000.0, 20000.0, 3866.452-1.384217*T^1+2.278344E-4*T^2-1.859314E-8*T^3+7.466511E-13*T^4-1.159342E-17*T^5}
      HC_gas_2: Piecewise "分段 2a"
        arg = T
        pieces = 
          {100.0, 6800.0, 20.786}
          {6800.0, 10000.0, 29.45447-0.005420606*T^1+1.338208E-6*T^2-1.625861E-10*T^3+9.680023E-15*T^4-2.24346E-19*T^5}
          {10000.0, 20000.0, 154.457-0.05529671*T^1+9.101531E-6*T^2-7.427587E-10*T^3+2.982722E-14*T^4-4.631341E-19*T^5}
      rho_gas_3: Piecewise "分段 3" | arg = T; pieces = {87.0, 3000.0, 522.2077*T^-1}
      TD: Piecewise "分段"
        arg = T
        pieces = 
          {50.0, 313.0, 1.473381E-7-4.058428E-9*T^1+2.637005E-10*T^2-1.823646E-13*T^3+8.210684E-17*T^4}
          {313.0, 3273.0, -7.696469E-6+5.101993E-8*T^1+1.233721E-10*T^2-1.523237E-14*T^3+1.553406E-18*T^4}
      eta: Piecewise "分段 5"
        arg = T
        pieces = 
          {50.0, 313.0, 1.543468E-6+4.229844E-8*T^1+3.145939E-10*T^2-1.058698E-12*T^3+1.095469E-15*T^4}
          {313.0, 3273.0, 2.823345E-6+7.51229E-8*T^1-3.008134E-11*T^2+8.881353E-15*T^3-1.007569E-18*T^4}
  mat3: Common "FR4 (Circuit Board)" on domains 6
    def "基本"
      relpermeability = 1
      electricconductivity = 0.004[S/m]
      relpermittivity = 4.5
      thermalexpansioncoefficient = 18e-6[1/K]
      heatcapacity = 1369[J/(kg*K)]
      density = 1900[kg/m^3]
      thermalconductivity = 0.3[W/(m*K)]
    Enu "杨氏模量和泊松比"
      youngsmodulus = 22e9[Pa]
      poissonsratio = 0.15

Physics
  ec: ConductiveMedia "电流" on all domains
    dependent variable V
    cucn1: CurrentConservation "电流守恒 1" (default)
    ein1: ElectricInsulation "电绝缘 1" (default)
    init1: init "初始值 1" (default)
    gnd1: Ground "接地 1" on boundaries 3
    pot3: ElectricPotential "电势 3" on boundaries 16 | V0 = vcathode
    init2: init "初始值 2" on domains 8 | V = vup
    init3: init "初始值 3" on domains 7 | V = vdown

Mesh
  mesh1 "网格 1"
    size: MeshSizeDefault "大小" | hcurve = 0.5; hnarrow = 0.6; hauto = 4
    ftri1: FreeTri "自由三角形网格 1" on boundaries 9, 26, 226
      size1: Size "大小 1" on boundaries 9, 26, 226 | hmax = 1.42E-4; hmin = 2.56E-5; hcurve = 0.6
      cr1: CornerRefinement "角细化 1" (disabled) on entire geometry
    swe1: Sweep "扫掠 1" on domains 3, 11, 16, 17, 24-26, 31, 32, 37, 38
      dis1: Distribution "分布 1" on domains 3, 11, 16, 17, 24-26, 31, 32, 37, 38
    ftri2: FreeTri "自由三角形网格 2" on boundaries 6, 36, 210
      size1: Size "大小 1" on boundaries 6, 36, 210 | hmax = 1.42E-4; hmin = 2.56E-5; hcurve = 0.6
      cr1: CornerRefinement "角细化 1" (disabled) on entire geometry
    swe2: Sweep "扫掠 2" on domains 1
      dis1: Distribution "分布 1" on domains 1 | type = predefined; elemcount = 20; elemratio = 20
    ftri3: FreeTri "自由三角形网格 3" on boundaries 15, 37, 213
      size1: Size "大小 1" on boundaries 15, 37, 213 | hmax = 1.42E-4; hmin = 2.56E-5; hcurve = 0.6
      cr1: CornerRefinement "角细化 1" (disabled) on entire geometry
    swe3: Sweep "扫掠 3" on domains 5
      dis1: Distribution "分布 1" on domains 5 | type = predefined; elemcount = 20; elemratio = 20
    conv1: Convert "转换 1" (disabled) on entire geometry
    ftet1: FreeTet "自由四面体网格 1" on remaining entities
      size1: Size "大小 1" on entire geometry | hauto = 3
  mesh2 "网格 2" (physics-controlled)

Studies
  std1 "研究 1"
    stat: Stationary "稳态" | mesh = {geom1, mesh1}

Solver configurations
  sol1 "解 1" (study std1)
    v1: Variables "因变量 1"
    s1: Stationary "稳态求解器 1"
      fc1: FullyCoupled "全耦合 1" | linsolver = i1
      i1: Iterative "迭代 1" | linsolver = cg
        mg1: Multigrid "多重网格 1" | prefun = amg
  sol3 "解 3" (study std1)
    // same settings as sol1

Datasets
  dset1: Solution | solution = sol3
  surf1: Surface "表面 1" on boundaries 1-23, 30, 31, 42-44, 49, 56, 57, 62, 63, 65-67, 76-78, 83, 84, 89, 102, 103, 105-107, 109, 110, 113, 118, 119, 124, 125, 129, 130, 132, 133, 141, 142, 144-151, 153-158, 163, 164, 169, 182, 183, 185-187, 189, 190, 193, 198, 199, 204, 205, 209, 210, 212, 213, 221, 223-229, 231-234, 239, 240, 245, 254, 257-261, 264, 269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
    data = dset1

Derived values
  gev1: EvalGlobal "全局计算 1" | data = dset1; table = tbl1; expr = random(1)

Plots
  pg1: PlotGroup3D "电势 (ec)" | data = dset1
    mslc1: Multislice "多切面 1" (disabled) | expr = V
    surf1: Surface "表面 1" | expr = V
    str1: Streamline "流线 1" (disabled) on boundaries 249, 266
      expr = {ec.Ex, ec.Ey, ec.Ez}
      descr = 电场
      startmethod = coord
      xcoord = range(pitch*2-3*rad,rad/5,2*pitch+3*rad)
      ycoord = range(sqrt(3)*pitch+3*rad,-rad/5,sqrt(3)*pitch-3*rad)
      zcoord = drift
      udist = rad
      uadv = manual
      mdist = {rad, rad*10}
      mseed = {pitch, pitch*sqrt(3)/2, 0}
      linetype = ribbon
      widthscale = 5.68e-06
      col1: Color "颜色表达式 1" | expr = V
    surf2: Surface "表面 2" | data = surf1; expr = V